# invalid references test

Dataset: EcoSpold 2, unit process
Geography: GLO
Time period: 2011-01-01 to 2024-12-31
System model: Allocation, cut-off by classification

## General comment
Tests handling of invalid UUIDs and missing activityLinkId references

## Reference product
- valid product: 1 kg
  production volume 1000 kg

## Inputs from technosphere
- input with missing activityLinkId: 0.5 kg
- input with invalid UUID: 0.3 kg
- input with empty activityLinkId: 0.2 kg
- input referencing non-existent activity: 0.1 kg
- input with whitespace in UUID: 5 MJ

## Emissions to nature
- Carbon dioxide, fossil [air, unspecified]: 1 kg
