# flexible power plant (gas mode)

Dataset: EcoSpold 2, unit process
Geography: GLO
Time period: 2011-01-01 to 2024-12-31
System model: Allocation, cut-off by classification

## General comment
Tests fuel switching: same plant using natural gas, producing heat + electricity

## Reference product
- Process heat: 1 MJ
  production volume 1000 MJ

## By-products
- Electricity: 0.8 MJ
  production volume 800 MJ

## Inputs from technosphere
- Natural gas: 0.3 m3

## Emissions to nature
- Carbon dioxide, fossil [air, unspecified]: 0.2 kg
- Nitrogen oxides [air, unspecified]: 1.5 g
- Methane [air, unspecified]: 0.5 g
