# agricultural production (compound units test)

Dataset: EcoSpold 2, unit process
Geography: GLO
Time period: 2011-01-01 to 2024-12-31
System model: Allocation, cut-off by classification

## General comment
Tests compound unit conversions: kg/ha, MJ/kg, person*km, m2*year

## Reference product
- wheat grain: 1 kg
  production volume 5000 kg

## Inputs from technosphere
- nitrogen fertilizer: 0.02 kg/ha
- diesel fuel: 0.1 MJ/kg
- passenger transport: 5 person*km

## Inputs from nature
- Agricultural land occupation [natural resource, land]: 0.0002 m2*year

## Emissions to nature
- Nitrous oxide (N2O) [air, unspecified]: 1e-5 kg N/ha
- Phosphate runoff [water, groundwater]: 5e-6 kg P/ha
