# water treatment (volume unit test)

Dataset: EcoSpold 2, unit process
Geography: GLO
Time period: 2011-01-01 to 2024-12-31
System model: Allocation, cut-off by classification

## General comment
Tests volume unit conversions: m³ (output) ↔ l (input) ↔ ml (chemicals)

## Reference product
- cooling water: 1 m3
  production volume 10000 m3

## Inputs from technosphere
- raw water: 1100 l
- aluminum sulfate: 50 ml
- distribution pipe: 0.001 km

## Inputs from nature
- Water, fresh [natural resource, in water]: 1.05 m3
- Land occupation, treatment plant [natural resource, land]: 0.0001 ha

## Emissions to nature
- Water treatment sludge [water, groundwater]: 5 dm3
